**
** Heading +++++++++++++++++++++++++++++++++++++++++++++++++
**
*Heading
Hash: FvRZHhvw, Date: 12/29/2025, Unit system: MM_TON_S_C
**
** Nodes +++++++++++++++++++++++++++++++++++++++++++++++++++
**
*Node
1, 2.50000000E+000, 2.50000000E+000, 1.10000000E+000
2, 2.50000000E+000, 2.50000000E+000, 2.10000000E+000
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**
** Elements ++++++++++++++++++++++++++++++++++++++++++++++++
**
*Element, Type=C3D4, Elset=Solid_part-1
1, 44, 66, 50, 79
2, 86, 68, 87, 79
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*Element, Type=C3D4, Elset=Solid_part-5
186, 113, 114, 625, 1326
187, 6300, 6306, 6226, 6229
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*Element, Type=C3D4, Elset=Solid_part-6
195, 3763, 9352, 3606, 3802
198, 3889, 9352, 3763, 3802
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*Element, Type=C3D4, Elset=Solid_part-4
45529, 9539, 9594, 9739, 9548
45530, 9697, 9739, 9677, 9539
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**
** Node sets +++++++++++++++++++++++++++++++++++++++++++++++
**
*Nset, Nset=Node_Set-Punch
1, 2, 3, 4, 5, 6
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*Nset, Nset=Node_Set-Die
9496, 9497, 9498, 9499, 9500, 9501
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*Nset, Nset=Internal-1_Internal_Selection-1_Contact_Pair-1_Master
1, 2, 3, 4, 5, 6
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*Nset, Nset=Internal-1_Internal_Selection-1_Contact_Pair-1_Slave
90, 91, 92, 93, 94, 95
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*Nset, Nset=Internal-1_Internal_Selection-1_Contact_Pair-2_Master
9496, 9497, 9498, 9499, 9500, 9501
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*Nset, Nset=Internal-1_Internal_Selection-1_Contact_Pair-2_Slave
90, 91, 92, 93, 94, 95
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**
** Additional node sets ++++++++++++++++++++++++++++++++++++
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**
** Element sets ++++++++++++++++++++++++++++++++++++++++++++
**
*Elset, Elset=Internal_Selection-1_Solid_Section-1
Solid_part-1,
Solid_part-4
*Elset, Elset=Internal_Selection-1_Solid_Section-2
Solid_part-5,
Solid_part-6
*Elset, Elset=Internal-1_Internal_Selection-1_Contact_Pair-1_Master_S4
2, 16, 20, 21, 28, 29
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*Elset, Elset=Internal-1_Internal_Selection-1_Contact_Pair-1_Master_S1
5, 9, 12, 14, 18, 21
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*Elset, Elset=Internal-1_Internal_Selection-1_Contact_Pair-1_Master_S2
6, 7, 8, 12, 26, 27
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*Elset, Elset=Internal-1_Internal_Selection-1_Contact_Pair-1_Master_S3
6, 13, 15, 16, 17, 20
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*Elset, Elset=Internal-1_Internal_Selection-1_Contact_Pair-1_Slave_S2
186, 191, 192, 207, 219, 262
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*Elset, Elset=Internal-1_Internal_Selection-1_Contact_Pair-1_Slave_S4
188, 189, 194, 195, 198, 201
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*Elset, Elset=Internal-1_Internal_Selection-1_Contact_Pair-1_Slave_S1
191, 192, 223, 249, 265, 276
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*Elset, Elset=Internal-1_Internal_Selection-1_Contact_Pair-1_Slave_S3
193, 250, 255, 271, 275, 279
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*Elset, Elset=Internal-1_Internal_Selection-1_Contact_Pair-2_Master_S3
45529, 45532, 45533, 45535, 45538, 45545
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*Elset, Elset=Internal-1_Internal_Selection-1_Contact_Pair-2_Master_S1
45531, 45536, 45547, 45551, 45552, 45556
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*Elset, Elset=Internal-1_Internal_Selection-1_Contact_Pair-2_Master_S2
45533, 45535, 45540, 45547, 45550, 45564
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*Elset, Elset=Internal-1_Internal_Selection-1_Contact_Pair-2_Master_S4
45535, 45542, 45546, 45548, 45556, 45561
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*Elset, Elset=Internal-1_Internal_Selection-1_Contact_Pair-2_Slave_S2
186, 191, 192, 207, 219, 262
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*Elset, Elset=Internal-1_Internal_Selection-1_Contact_Pair-2_Slave_S4
188, 189, 194, 195, 198, 201
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*Elset, Elset=Internal-1_Internal_Selection-1_Contact_Pair-2_Slave_S1
191, 192, 223, 249, 265, 276
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*Elset, Elset=Internal-1_Internal_Selection-1_Contact_Pair-2_Slave_S3
193, 250, 255, 271, 275, 279
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**
** Surfaces ++++++++++++++++++++++++++++++++++++++++++++++++
**
*Surface, Name=Internal_Selection-1_Contact_Pair-1_Master, Type=Element
Internal-1_Internal_Selection-1_Contact_Pair-1_Master_S4, S4
Internal-1_Internal_Selection-1_Contact_Pair-1_Master_S1, S1
Internal-1_Internal_Selection-1_Contact_Pair-1_Master_S2, S2
Internal-1_Internal_Selection-1_Contact_Pair-1_Master_S3, S3
*Surface, Name=Internal_Selection-1_Contact_Pair-1_Slave, Type=Element
Internal-1_Internal_Selection-1_Contact_Pair-1_Slave_S2, S2
Internal-1_Internal_Selection-1_Contact_Pair-1_Slave_S4, S4
Internal-1_Internal_Selection-1_Contact_Pair-1_Slave_S1, S1
Internal-1_Internal_Selection-1_Contact_Pair-1_Slave_S3, S3
*Surface, Name=Internal_Selection-1_Contact_Pair-2_Master, Type=Element
Internal-1_Internal_Selection-1_Contact_Pair-2_Master_S3, S3
Internal-1_Internal_Selection-1_Contact_Pair-2_Master_S1, S1
Internal-1_Internal_Selection-1_Contact_Pair-2_Master_S2, S2
Internal-1_Internal_Selection-1_Contact_Pair-2_Master_S4, S4
*Surface, Name=Internal_Selection-1_Contact_Pair-2_Slave, Type=Element
Internal-1_Internal_Selection-1_Contact_Pair-2_Slave_S2, S2
Internal-1_Internal_Selection-1_Contact_Pair-2_Slave_S4, S4
Internal-1_Internal_Selection-1_Contact_Pair-2_Slave_S1, S1
Internal-1_Internal_Selection-1_Contact_Pair-2_Slave_S3, S3
**
** Physical constants ++++++++++++++++++++++++++++++++++++++
**
**
** Coordinate systems ++++++++++++++++++++++++++++++++++++++
**
**
** Materials +++++++++++++++++++++++++++++++++++++++++++++++
**
*Material, Name=S185
*Density
7.8E-09
*Elastic
210000, 0.28
*Expansion, Zero=20
1.1E-05
*Conductivity
14
*Specific heat
440000000
*Material, Name=1060_Alloy
*Density
2.7E-09
*Elastic
69000, 0.33
*Expansion, Zero=20
2.4E-05
*Conductivity
200
*Specific heat
900000000
**
** Sections ++++++++++++++++++++++++++++++++++++++++++++++++
**
*Solid section, Elset=Internal_Selection-1_Solid_Section-1, Material=S185
*Solid section, Elset=Internal_Selection-1_Solid_Section-2, Material=1060_Alloy
**
** Pre-tension sections ++++++++++++++++++++++++++++++++++++
**
**
** Constraints +++++++++++++++++++++++++++++++++++++++++++++
**
**
** Surface interactions ++++++++++++++++++++++++++++++++++++
**
*Surface interaction, Name=Surface_Interaction-1
*Surface behavior, Pressure-overclosure=Linear
10000000, 2.86
**
** Contact pairs +++++++++++++++++++++++++++++++++++++++++++
**
*Contact pair, Interaction=Surface_Interaction-1, Type=Surface to surface
Internal_Selection-1_Contact_Pair-1_Slave, Internal_Selection-1_Contact_Pair-1_Master
*Contact pair, Interaction=Surface_Interaction-1, Type=Surface to surface
Internal_Selection-1_Contact_Pair-2_Slave, Internal_Selection-1_Contact_Pair-2_Master
**
** Amplitudes ++++++++++++++++++++++++++++++++++++++++++++++
**
*Amplitude, Name=Tabular-1
0, 0, 0.05, -2.5, 0.1, 0
**
** Initial conditions ++++++++++++++++++++++++++++++++++++++
**
**
** Steps +++++++++++++++++++++++++++++++++++++++++++++++++++
**
**
** Step-1 ++++++++++++++++++++++++++++++++++++++++++++++++++
**
*Step, Inc=1000000
*Dynamic, Solver=Pardiso
1E-06, 0.1, 1E-09, 1E-06
**
** Controls ++++++++++++++++++++++++++++++++++++++++++++++++
**
**
** Output frequency ++++++++++++++++++++++++++++++++++++++++
**
**
** Boundary conditions +++++++++++++++++++++++++++++++++++++
**
*Boundary, op=New
** Name: Displacement_Rotation-Punch
*Boundary, Amplitude=Tabular-1
9741, 1, 1, 0
9741, 2, 2, 0
9741, 3, 3, 1
9742, 1, 1, 0
9742, 2, 2, 0
9742, 3, 3, 0
** Name: Displacement_Rotation-Die
*Boundary
9743, 1, 1, 0
9743, 2, 2, 0
9743, 3, 3, 0
9744, 1, 1, 0
9744, 2, 2, 0
9744, 3, 3, 0
**
** Loads +++++++++++++++++++++++++++++++++++++++++++++++++++
**
*Cload, op=New
*Dload, op=New
**
** Defined fields ++++++++++++++++++++++++++++++++++++++++++
**
**
** History outputs +++++++++++++++++++++++++++++++++++++++++
**
**
** Field outputs +++++++++++++++++++++++++++++++++++++++++++
**
*Node file
RF, U, V
*El file
S, E, ENER, NOE
**
** End step ++++++++++++++++++++++++++++++++++++++++++++++++
**
*End step
